new load.load_14487225 bus1=14487225.1 kv=0.2396003617136947  phases=1 kW=1 pf=1
new load.load_14488442 bus1=14488442.2 kv=0.2396003617136947  phases=1 kW=1 pf=1
new load.load_14489644 bus1=14489644.3 kv=0.2396003617136947  phases=1 kW=1 pf=1
new load.load_14487248 bus1=14487248.1 kv=0.2396003617136947  phases=1 kW=1 pf=1
new load.load_14487250 bus1=14487250.2 kv=0.2396003617136947  phases=1 kW=1 pf=1
new load.load_14487245 bus1=14487245.3 kv=0.2396003617136947  phases=1 kW=1 pf=1
new load.load_14489707 bus1=14489707.1 kv=0.2396003617136947  phases=1 kW=1 pf=1
new load.load_14489704 bus1=14489704.2 kv=0.2396003617136947  phases=1 kW=1 pf=1
new load.load_14487264 bus1=14487264.3 kv=0.2396003617136947  phases=1 kW=1 pf=1
new load.load_14487219 bus1=14487219.1 kv=0.2396003617136947  phases=1 kW=1 pf=1
new load.load_14487234 bus1=14487234.2 kv=0.2396003617136947  phases=1 kW=1 pf=1
new load.load_14487270 bus1=14487270.3 kv=0.2396003617136947  phases=1 kW=1 pf=1
new load.load_14487228 bus1=14487228.1 kv=0.2396003617136947  phases=1 kW=1 pf=1
new load.load_14487258 bus1=14487258.2 kv=0.2396003617136947  phases=1 kW=1 pf=1
new load.load_14489686 bus1=14489686.3 kv=0.2396003617136947  phases=1 kW=1 pf=1
new load.load_14487261 bus1=14487261.1 kv=0.2396003617136947  phases=1 kW=1 pf=1
new load.load_14487256 bus1=14487256.2 kv=0.2396003617136947  phases=1 kW=1 pf=1
new load.load_14489647 bus1=14489647.3 kv=0.2396003617136947  phases=1 kW=1 pf=1
new load.load_14489653 bus1=14489653.1 kv=0.2396003617136947  phases=1 kW=1 pf=1
new load.load_14489656 bus1=14489656.2 kv=0.2396003617136947  phases=1 kW=1 pf=1
new load.load_14487241 bus1=14487241.3 kv=0.2396003617136947  phases=1 kW=1 pf=1
new load.load_14485921 bus1=14485921.1 kv=0.2396003617136947  phases=1 kW=1 pf=1
new load.load_14489710 bus1=14489710.2 kv=0.2396003617136947  phases=1 kW=1 pf=1
new load.load_14487239 bus1=14487239.3 kv=0.2396003617136947  phases=1 kW=1 pf=1
new load.load_14487253 bus1=14487253.1 kv=0.2396003617136947  phases=1 kW=1 pf=1
new load.load_14487232 bus1=14487232.2 kv=0.2396003617136947  phases=1 kW=1 pf=1
new load.load_14487237 bus1=14487237.3 kv=0.2396003617136947  phases=1 kW=1 pf=1
new load.load_14487230 bus1=14487230.1 kv=0.2396003617136947  phases=1 kW=1 pf=1
new load.load_14489680 bus1=14489680.2 kv=0.2396003617136947  phases=1 kW=1 pf=1
new load.load_14487267 bus1=14487267.3 kv=0.2396003617136947  phases=1 kW=1 pf=1
new load.load_14489699 bus1=14489699.1 kv=0.2396003617136947  phases=1 kW=1 pf=1
new load.load_14489678 bus1=14489678.2 kv=0.2396003617136947  phases=1 kW=1 pf=1
new load.load_14489659 bus1=14489659.3 kv=0.2396003617136947  phases=1 kW=1 pf=1
new load.load_14489696 bus1=14489696.1 kv=0.2396003617136947  phases=1 kW=1 pf=1
new load.load_14489661 bus1=14489661.2 kv=0.2396003617136947  phases=1 kW=1 pf=1
