!Linecodes with scaled impedance parameters (the value of r1, x1, r0, x0 have been deliberately obfuscated).
!NB: line lenghts scaled by reciprocal of the same scaling parameter, retaining the same line impedances.
New linecode.default units=km r1=0.0463 x1=0.232 c1=0.0 r0=1e-07 x0=1e-06 c0=0.0 nphases=3 basefreq=50 Kron=Y
New linecode.OHL_230V_0.0225_OCU units=km nphases=3 basefreq=50 Kron=Y r1=5.56 x1=1.77 r0=5.56 x0=1.77 c1=0 c0=0 Normamps=149.2705
New linecode.OHL_230V_0.05_OAL units=km nphases=3 basefreq=50 Kron=Y r1=2.51 x1=1.38 r0=2.51 x0=1.38 c1=0 c0=0 Normamps=193
New linecode.OHL_230V_25_OAL units=km nphases=3 basefreq=50 Kron=Y r1=5.09 x1=1.77 r0=5.09 x0=1.77 c1=0 c0=0 Normamps=124.9212
New linecode.OHL_230V_35_ABC units=km nphases=3 basefreq=50 Kron=Y r1=4.02 x1=0.389 r0=4.02 x0=0.389 c1=0 c0=0 Normamps=125
New linecode.OHL_230V_50_ABC units=km nphases=3 basefreq=50 Kron=Y r1=2.97 x1=0.389 r0=2.97 x0=0.389 c1=0 c0=0 Normamps=149
New linecode.OHL_230V_50_OAL units=km nphases=3 basefreq=50 Kron=Y r1=2.51 x1=1.38 r0=2.51 x0=1.38 c1=0 c0=0 Normamps=193
New linecode.UNKNOWN_LV_OHLine_S units=km nphases=3 basefreq=50 Kron=Y r1=5.56 x1=1.77 r0=5.56 x0=1.77 c1=0 c0=0 Normamps=149.2705
New linecode.UNKNOWN_LV_OHLine_M units=km nphases=3 basefreq=50 Kron=Y r1=0.847 x1=1.2 r0=0.001 x0=0.001 c1=0 c0=0 Normamps=309
New linecode.Cable_230V_0.0125_AL units=km nphases=3 basefreq=50 Kron=Y r1=17.2 x1=0.522 r0=17.2 x0=0.522 c1=0 c0=0 Normamps=55.4067
New linecode.Cable_230V_0.0125_CU units=km nphases=3 basefreq=50 Kron=Y r1=10.6 x1=0.546 r0=10.6 x0=0.546 c1=0 c0=0 Normamps=72.5522
New linecode.Cable_230V_0.0225_CU units=km nphases=3 basefreq=50 Kron=Y r1=5.84 x1=0.398 r0=5.84 x0=0.398 c1=0 c0=0 Normamps=100
New linecode.Cable_230V_0.025_CU units=km nphases=3 basefreq=50 Kron=Y r1=5.27 x1=0.499 r0=5.27 x0=0.499 c1=0 c0=0 Normamps=107.2584
New linecode.Cable_230V_0.03_AL units=km nphases=3 basefreq=50 Kron=Y r1=7.15 x1=0.472 r0=7.15 x0=0.472 c1=0 c0=0 Normamps=91.4444
New linecode.Cable_230V_0.04_AL units=km nphases=3 basefreq=50 Kron=Y r1=5.36 x1=0.457 r0=5.36 x0=0.457 c1=0 c0=0 Normamps=107.8101
New linecode.Cable_230V_0.04_CU units=km nphases=3 basefreq=50 Kron=Y r1=3.26 x1=0.361 r0=3.26 x0=0.361 c1=0 c0=0 Normamps=140
New linecode.Cable_230V_0.05_CU units=km nphases=3 basefreq=50 Kron=Y r1=2.7 x1=0.352 r0=2.52 x0=0.352 c1=0 c0=0 Normamps=160
New linecode.Cable_230V_0.06_AL units=km nphases=3 basefreq=50 Kron=Y r1=3.55 x1=0.347 r0=3.55 x0=0.347 c1=0 c0=0 Normamps=135
New linecode.Cable_230V_0.06_CU units=km nphases=3 basefreq=50 Kron=Y r1=2.15 x1=0.347 r0=2.15 x0=0.347 c1=0 c0=0 Normamps=175
New linecode.Cable_230V_0.1_AL units=km nphases=3 basefreq=50 Kron=Y r1=2.11 x1=0.338 r0=2.11 x0=0.338 c1=0 c0=0 Normamps=185
New linecode.Cable_230V_0.1_CU units=km nphases=3 basefreq=50 Kron=Y r1=1.28 x1=0.338 r0=1.28 x0=0.338 c1=0 c0=0 Normamps=240
New linecode.Cable_230V_0.15_AL units=km nphases=3 basefreq=50 Kron=Y r1=1.44 x1=0.324 r0=1.44 x0=0.324 c1=0 c0=0 Normamps=225
New linecode.Cable_230V_0.15_CU units=km nphases=3 basefreq=50 Kron=Y r1=0.871 x1=0.324 r0=0.871 x0=0.324 c1=0 c0=0 Normamps=290
New linecode.Cable_230V_0.2_AL units=km nphases=3 basefreq=50 Kron=Y r1=1.08 x1=0.32 r0=1.08 x0=0.32 c1=0 c0=0 Normamps=270
New linecode.Cable_230V_0.2_CU units=km nphases=3 basefreq=50 Kron=Y r1=0.658 x1=0.315 r0=0.658 x0=0.315 c1=0 c0=0 Normamps=345
New linecode.Cable_230V_0.25_AL units=km nphases=3 basefreq=50 Kron=Y r1=0.866 x1=0.315 r0=0.866 x0=0.315 c1=0 c0=0 Normamps=310
New linecode.Cable_230V_0.25_CU units=km nphases=3 basefreq=50 Kron=Y r1=0.523 x1=0.31 r0=0.523 x0=0.31 c1=0 c0=0 Normamps=395
New linecode.Cable_230V_0.3_AL units=km nphases=3 basefreq=50 Kron=Y r1=0.704 x1=0.315 r0=0.704 x0=0.315 c1=0 c0=0 Normamps=350
New linecode.Cable_230V_0.3_CU units=km nphases=3 basefreq=50 Kron=Y r1=0.426 x1=0.31 r0=0.426 x0=0.31 c1=0 c0=0 Normamps=445
New linecode.Cable_230V_0.5_AL units=km nphases=3 basefreq=50 Kron=Y r1=0.426 x1=0.31 r0=0.426 x0=0.31 c1=0 c0=0 Normamps=450
New linecode.Cable_230V_0.5_CU units=km nphases=3 basefreq=50 Kron=Y r1=0.255 x1=0.296 r0=0.255 x0=0.296 c1=0 c0=0 Normamps=570
New linecode.Cable_230V_4_CU units=km nphases=3 basefreq=50 Kron=Y r1=1.51 x1=0.546 r0=1.51 x0=0.546 c1=0 c0=0 Normamps=53.0435
New linecode.Cable_230V_16_CU units=km nphases=3 basefreq=50 Kron=Y r1=0.69 x1=0.499 r0=0.69 x0=0.499 c1=0 c0=0 Normamps=115.6522
New linecode.Cable_230V_25_AL units=km nphases=3 basefreq=50 Kron=Y r1=5.82 x1=0.471 r0=5.82 x0=0.471 c1=0 c0=0 Normamps=103
New linecode.Cable_230V_25_AL_ACT units=km nphases=3 basefreq=50 Kron=Y r1=5.56 x1=6.71 r0=6.02 x0=6.71 c1=0 c0=0 Normamps=97
New linecode.Cable_230V_25_AL_ASCT units=km nphases=3 basefreq=50 Kron=Y r1=5.56 x1=6.71 r0=6.02 x0=6.71 c1=0 c0=0 Normamps=97
New linecode.Cable_230V_25_AL_ACS units=km nphases=3 basefreq=50 Kron=Y r1=5.56 x1=6.71 r0=6.02 x0=6.71 c1=0 c0=0 Normamps=115
New linecode.Cable_230V_25_AL_ASCS units=km nphases=3 basefreq=50 Kron=Y r1=5.56 x1=6.71 r0=6.02 x0=6.71 c1=0 c0=0 Normamps=115
New linecode.Cable_230V_25_CU units=km nphases=3 basefreq=50 Kron=Y r1=3.42 x1=0.471 r0=3.42 x0=0.471 c1=0 c0=0 Normamps=137
New linecode.Cable_230V_25_CU_CSCT units=km nphases=3 basefreq=50 Kron=Y r1=0.615 x1=0.361 r0=0.615 x0=0.361 c1=0 c0=0 Normamps=129.7595
New linecode.Cable_230V_25_CU_CSCS units=km nphases=3 basefreq=50 Kron=Y r1=0.531 x1=0.361 r0=0.531 x0=0.361 c1=0 c0=0 Normamps=150.4348
New linecode.Cable_230V_35_AL_ACT units=km nphases=3 basefreq=50 Kron=Y r1=4.02 x1=4.86 r0=4.21 x0=4.86 c1=0 c0=0 Normamps=115
New linecode.Cable_230V_35_AL_ASCT units=km nphases=3 basefreq=50 Kron=Y r1=4.02 x1=4.86 r0=4.21 x0=4.86 c1=0 c0=0 Normamps=115
New linecode.Cable_230V_35_AL_HYBRID units=km nphases=3 basefreq=50 Kron=Y r1=4.02 x1=0.347 r0=4.22 x0=0.347 c1=0 c0=0 Normamps=120
New linecode.Cable_230V_35_AL_ACS units=km nphases=3 basefreq=50 Kron=Y r1=4.02 x1=4.86 r0=4.21 x0=4.86 c1=0 c0=0 Normamps=140
New linecode.Cable_230V_35_AL_ASCS units=km nphases=3 basefreq=50 Kron=Y r1=4.02 x1=4.86 r0=4.21 x0=4.86 c1=0 c0=0 Normamps=140
New linecode.Cable_230V_35_CU_CCT units=km nphases=3 basefreq=50 Kron=Y r1=0.695 x1=0.352 r0=0.695 x0=0.352 c1=0 c0=0 Normamps=114.8927
New linecode.Cable_230V_35_CU_CSCS units=km nphases=3 basefreq=50 Kron=Y r1=0.353 x1=0.352 r0=0.353 x0=0.352 c1=0 c0=0 Normamps=226.0326
New linecode.Cable_230V_35_CU_CSCT units=km nphases=3 basefreq=50 Kron=Y r1=0.353 x1=0.352 r0=0.353 x0=0.352 c1=0 c0=0 Normamps=226.0326
New linecode.Cable_230V_35_CU_CCS units=km nphases=3 basefreq=50 Kron=Y r1=0.294 x1=0.352 r0=0.294 x0=0.352 c1=0 c0=0 Normamps=271.3043
New linecode.Cable_230V_95_AL units=km nphases=3 basefreq=50 Kron=Y r1=1.48 x1=0.324 r0=1.48 x0=0.324 c1=0 c0=0 Normamps=225
New linecode.Cable_230V_95_CU units=km nphases=3 basefreq=50 Kron=Y r1=0.893 x1=0.391 r0=0.893 x0=0.391 c1=0 c0=0 Normamps=287.2497
New linecode.Cable_230V_185_AL_WAVE units=km nphases=3 basefreq=50 Kron=Y r1=0.759 x1=0.343 r0=0.759 x0=0.343 c1=0 c0=0 Normamps=335
New linecode.Cable_230V_185_AL_WAVEF units=km nphases=3 basefreq=50 Kron=Y r1=0.759 x1=0.317 r0=0.38 x0=0.317 c1=0 c0=0 Normamps=400
New linecode.Cable_230V_185_AL units=km nphases=3 basefreq=50 Kron=Y r1=0.759 x1=0.315 r0=0.759 x0=0.315 c1=0 c0=0 Normamps=330
New linecode.Cable_230V_240_AL_CONSAC units=km nphases=3 basefreq=50 Kron=Y r1=0.582 x1=0.361 r0=0.584 x0=0.361 c1=0 c0=0 Normamps=380.676
New linecode.Cable_230V_300_AL_WAVE units=km nphases=3 basefreq=50 Kron=Y r1=0.463 x1=0.336 r0=0.759 x0=0.336 c1=0 c0=0 Normamps=435
New linecode.Cable_230V_300_AL_CONSAC units=km nphases=3 basefreq=50 Kron=Y r1=0.463 x1=0.313 r0=0.463 x0=0.313 c1=0 c0=0 Normamps=420
New linecode.Cable_230V_300_CU units=km nphases=3 basefreq=50 Kron=Y r1=0.278 x1=0.359 r0=0.278 x0=0.359 c1=0 c0=0 Normamps=548.1244
New linecode.UNKNOWN_LV_Cable_S units=km nphases=3 basefreq=50 Kron=Y r1=3.42 x1=0.471 r0=3.42 x0=0.471 c1=0 c0=0 Normamps=137
New linecode.UNKNOWN_LV_Cable_M units=km nphases=3 basefreq=50 Kron=Y r1=0.322 x1=0.359 r0=0.001 x0=0.001 c1=0 c0=0 Normamps=309
New linecode.BUSBAR units=km nphases=3 basefreq=50 Kron=Y r1=0.001 x1=0.001 r0=0.001 x0=0.001 c1=0 c0=0 Normamps=1000
New linecode.CONNECTOR units=km nphases=3 basefreq=50 Kron=Y r1=0.001 x1=0.001 r0=0.001 x0=0.001 c1=0 c0=0 Normamps=1000
