! chosen manually using master
! ID here then replace in xxxx

!14534810 to 9376744
!9336563 to 17641788
!15870547 to 14854625 ! between networks
!13407292
!17892708

new load.sop_a1_14534810_1 bus1=14534810.1 kv=0.2396003617136947 phases=1 kW=0 pf=1
new load.sop_a1_14534810_2 bus1=14534810.2 kv=0.2396003617136947 phases=1 kW=0 pf=1
new load.sop_a1_14534810_3 bus1=14534810.3 kv=0.2396003617136947 phases=1 kW=0 pf=1

new load.sop_b1_9376744_1 bus1=9376744.1 kv=0.2396003617136947 phases=1 kW=0 pf=1
new load.sop_b1_9376744_2 bus1=9376744.2 kv=0.2396003617136947 phases=1 kW=0 pf=1
new load.sop_b1_9376744_3 bus1=9376744.3 kv=0.2396003617136947 phases=1 kW=0 pf=1


new load.sop_a2_9336563_1 bus1=9336563.1 kv=0.2396003617136947 phases=1 kW=0 pf=1
new load.sop_a2_9336563_2 bus1=9336563.2 kv=0.2396003617136947 phases=1 kW=0 pf=1
new load.sop_a2_9336563_3 bus1=9336563.3 kv=0.2396003617136947 phases=1 kW=0 pf=1

new load.sop_b2_17641788_1 bus1=17641788.1 kv=0.2396003617136947 phases=1 kW=0 pf=1
new load.sop_b2_17641788_2 bus1=17641788.2 kv=0.2396003617136947 phases=1 kW=0 pf=1
new load.sop_b2_17641788_3 bus1=17641788.3 kv=0.2396003617136947 phases=1 kW=0 pf=1


new load.sop_a3_15870547_1 bus1=15870547.1 kv=0.2396003617136947 phases=1 kW=0 pf=1
new load.sop_a3_15870547_2 bus1=15870547.2 kv=0.2396003617136947 phases=1 kW=0 pf=1
new load.sop_a3_15870547_3 bus1=15870547.3 kv=0.2396003617136947 phases=1 kW=0 pf=1

new load.sop_b3_14854625_1 bus1=14854625.1 kv=0.2396003617136947 phases=1 kW=0 pf=1
new load.sop_b3_14854625_2 bus1=14854625.2 kv=0.2396003617136947 phases=1 kW=0 pf=1
new load.sop_b3_14854625_3 bus1=14854625.3 kv=0.2396003617136947 phases=1 kW=0 pf=1


new load.sop_x4_13407292_1 bus1=13407292.1 kv=0.2396003617136947 phases=1 kW=0 pf=1
new load.sop_x4_13407292_2 bus1=13407292.2 kv=0.2396003617136947 phases=1 kW=0 pf=1
new load.sop_x4_13407292_3 bus1=13407292.3 kv=0.2396003617136947 phases=1 kW=0 pf=1

new load.sop_x5_17892708_1 bus1=17892708.1 kv=0.2396003617136947 phases=1 kW=0 pf=1
new load.sop_x5_17892708_2 bus1=17892708.2 kv=0.2396003617136947 phases=1 kW=0 pf=1
new load.sop_x5_17892708_3 bus1=17892708.3 kv=0.2396003617136947 phases=1 kW=0 pf=1
